// COMSOL Multiphysics 6.1.0.357 model "Circle_vs_rectangle_all_same_220.mph"
// Outline of the model tree

Parameters
  b = 0.1
  a = 2
  L = 2.2

Functions
  rn1: Random | nargs = 3; seed = 113013

Geometry
  geom1 "Geometry 1" (2D, length unit m)
    c1: Circle (disabled) | r = L
    c2: Circle (disabled) | pos = {3, 0}; r = 2.61
    r2: Rectangle (disabled) | pos = {0, -3.1}; base = center; size = {2*L, 0.5}
    r1: Rectangle (disabled) | pos = {3, -3.15}; base = center; size = {4.45, 0.5}
    e1: Ellipse | pos = {0, -4}; semiaxes = {10, 0.5}
    e2: Ellipse (disabled) | pos = {3, -4}; semiaxes = {2.67, 0.25}
    fin: Finalize "Form Assembly" | action = assembly

Physics
  c: CoefficientFormPDE on all domains
    dependent variable u = {u, v}
    EquationForm.form = Automatic
    cfeq1: CoefficientFormPDE (default)
      c = {{1, 0, 0, 1}, {0, 0, 0, 0}, {0, 0, 0, 0}, {10, 0, 0, 10}}
      f = {1/10-u+u^2*v, 9/10-u^2*v}
      da = {1, 0, 0, 1}
    zflx1: ZeroFluxBoundary "Zero Flux 1" (default)
    init1: init "Initial Values 1" (default) | u = abs(1+2*rn1(x,y,1)); v = abs(9/10+2*rn1(x,y,2))

Mesh
  mesh1 "Mesh 1" (physics-controlled)
    size: MeshSizeDefault | hauto = 1

Studies
  std1 "Study 1"
    time: Transient "Time Dependent" | tlist = range(0,1e3,1e4)

Solver configurations
  sol1 "Solution 1" (study std1)
    v1: Variables "Dependent Variables 1"
    t1: Time "Time-Dependent Solver 1" | tlist = range(0,1e3,1e4)
      dDef: Direct
      fc1: FullyCoupled | linsolver = dDef

Datasets
  dset1: Solution | solution = sol1

Plots
  pg1: PlotGroup2D "Coefficient Form PDE" | data = dset1
    surf1: Surface | expr = u

Exports
  data1: Data
    data = dset1
    expr = u
    filename = C:\Users\Thomas Woolley\Dropbox\Turing_bifurcations_ellipse\Comsol\Data\Circle_rectangle_ellipse_L_270.txt